# Worksheet setting: ORIGIN = 1
ε := READEXCEL(".\data\Machined coupon cyclic test 2021.xlsx", "Data 2021!A14:A286")
σ_test := READEXCEL(".\data\Machined coupon cyclic test 2021.xlsx", "Data 2021!B14:B286")
# [plot: σ_test vs ε]
data := READEXCEL(".\data\Machined coupon cyclic test 2021.xlsx", "Data 2021!B4:B8")
σ_y := data[1] = 481
data = [481; 680; 205; 0.0132; 0.149]
σ_su := data[2] = 680
E_s := data[3]*10^3 = 205000
ε_y := σ_y/E_s = 0.00234634
ε_su := data[5] = 0.149
ζ := 0.6
r := (σ_su/σ_y - 1)/(ζ*ε_su/ε_y - 1) = 0.011151
branch := 3
length(ε)
return [ε_max, σ_max, ε_min, σ_min]
□ := 0  # error: Missing term or expression.
σ_max := 0
ε_min := -ε_y = -0.00234634
σ_min := -σ_y = -481
σ :=
    ε_max ← 0
    σ_max ← 0
    ε_min ← -ε_y
    σ_min ← -σ_y
    r ← (σ_su/σ_y - 1)/(ζ*ε_su/ε_y - 1)
    for i ∈ 2 .. 20
        Δε ← ε[i] - ε[i - 1]
        if branch == 1 or branch == 3
            if ε_min ≤ ε[i] ≤ ε_max
                σ[i] ← E_s*(ε[i] - ε_min) + σ_min
            else
                if ε[i] > ε_max
                    branch ← 2
                    ε_min ← ε[i]
                    σ_min ← σ[i]
                else if ε[i] < ε_min
                    branch ← 4
        if (branch == 2 and Δε > 0) or (branch == 4 and Δε < 0)
            σ[i] ← r*E_s*(ε[i] - ε_min) + σ_min
            if branch == 2 and Δε < 0
                branch ← 3
                ε_max ← ε[i - 1]
                σ_max ← σ[i - 1]
                ε_min ← ε_max - 2*ε_y
                σ_min ← σ_max - 2*σ_y
                σ[i] ← min(E_s*(ε[i] - ε_max) + σ_max, σ_max)
            else if branch == 4 and Δε > 0
                branch ← 1
                ε_min ← ε[i - 1]
                σ_min ← σ[i - 1]
                ε_max ← ε_min + 2*ε_y
                σ_max ← σ_min + 2*σ_y
                σ[i] ← max(E_s*(ε[i] - ε_min) + σ_min, σ_min)
    return σ
σ = [0; -401.185; -422.3; -443.415; -464.53; -481.523; -482.935; -487.409; -488.115]
r*E_s*(ε[6] - ε_min) + σ_min = -481.523
return [ε_max, σ_max, ε_min, σ_min]
length(σ) = 9
# [plot: σ vs ε]
