# Sample calculation for confined concrete
# Yield stress of steel
f_y := 74.3 ksi
f_su := 101.5 ksi
E_s := 29000 ksi
ε_sh := 0.0027
ε_su := 0.154
ε_y := f_y/E_s = 0.00256207
P := 3
f_steel(ε) :=
    if 0 ≤ ε ≤ ε_y
        E_s*ε
    else if ε_y ≤ ε ≤ ε_sh
        f_y
    else if ε_sh ≤ ε ≤ ε_su
        f_su - (f_su - f_y)*((ε_su - ε)/(ε_su - ε_sh))^P
    else if -ε_y ≤ ε ≤ 0
        E_s*ε
    else if ε ≤ -ε_y
        -f_y
    else
        0
# Modified Mander's Model
ε_1 := 0, 0.0001 .. ε_su + 0.001
ε_2 := 0, -0.001 .. -0.04
# [chart]
    Y[1] := f_steel(ε_1)
    Y[2] := f_steel(ε_2)
    X[1] := ε_1
    X[2] := ε_2
