# Sample calculation for confined concrete
# *Strength of concrete
f'_c := 6 ksi
# Calculate effective confining stress
# Clear Spacing between hoops
s' := 6 in - 2*0.625 in = 4.75 in
# Hoop diameter
D_s := 44 in - 0.625 in = 43.375 in
# Longitudinal bar yield strength
f_y := 60.4 ksi
# Area of Long. bars
A_b := 2*0.31 in^2
# Spacing of hoops
s := 6 in
# Passive confining stress
f'_i := 2*f_y*A_b/(s*D_s) = 287.785 psi
# Confinement efficiency coefficient
K_e := (1 - s'/(2*D_s))^2 = 0.893488
# Effective confining stress
f'_ie := K_e*f'_i = 257.132 psi
# *Ratio
# added it for clarity
f'_ie/f'_c = 0.0428554
# Calculate confined concrete compressive strength and strain
# Confinement coefficient
K_c := 4.1
# Confined concrete compressive strength
f'_cc := f'_c + K_c*f'_ie = 7.05424 ksi
# *Ratio
# added it for clarity
f'_cc/f'_c = 1.17571
# Strain at unconfined compressive strength
ε'_c := -0.0027
# Strain at f'_cc
ε'_cc := ε'_c*(1 + 20*f'_ie/f'_c) = -0.00501419
# Calculate normalization term
# Longitudinal bar yield strength
f_y := 74.3 ksi
# *Column length
L := 24 ft
# *Column spread of plasticity
l_p1 := 0.08*L = 23.04 in
# Gage length ratio for unconfine conc.
λ_c := 16 in/l_p1 = 0.694444
# Calculate terms for Modified Mander's model
# *Confined concrete secant modulus
# formatted output
E_secc := -f'_cc/ε'_cc = 1406.86 ksi
# *Concrete elastic modulus
# you had Ec in psi!
E_c := 3250 ksi
# *Ratio added it for clarity -
E_secc/E_c = 0.432879
r_cc := 1/(1 - E_secc/E_c) = 1.76329
# Power term
# * lambda_c = 1 from zero to the peak, ie no gage length dependence in this part of the curve.  See Eq. 11
E_c := 3250 ksi
f'_t := 300 psi*ln(1 + f'_c/(1800 psi)) = 439.901 psi
ε'_t := f'_t/E_c = 0.000135354
# Modified Mander's Model
f_confined(ε) :=
    if 0 ≤ ε ≤ ε'_t
        E_c*ε
    else if ε > ε'_t
        0.7*f'_t/(1 + sqrt(500*ε))
    else if ε'_cc ≤ ε ≤ 0
        λ_c ← 1
        -(1 + 1/λ_c*(ε/ε'_cc - 1))/(r_cc - 1 + (1 + (1/λ_c)*(ε/ε'_cc - 1))^r_cc)*r_cc*f'_cc
    else if ε ≤ ε'_cc and ε ≥ -0.02
        -(1 + 1/λ_c*(ε/ε'_cc - 1))/(r_cc - 1 + (1 + (1/λ_c)*(ε/ε'_cc - 1))^r_cc)*r_cc*f'_cc
    else
        0
ε_1 := 0, 0.00001 .. ε'_t*10
ε_2 := 0, -0.00001 .. -0.03
# [chart]
    Y[1] := f_confined(ε_1)
    Y[2] := f_confined(ε_2)
    X[1] := ε_1
    X[2] := ε_2
