# Sample calculation for Unconfined concrete
# Strength of concrete
f'_c := 6 ksi
# Power ratio
η_E := 1 + 3600/(f'_c/psi) = 1.6
# Strain at compressive strength
ε'_c := -0.0027
# Ultimate strain
ε'_cu := -0.006
# Power ratio
r_c := 1/(1 - 1/η_E) = 2.66667
# More material properties
# Longitudinal bar yield strength
f_y := 74.3 ksi
# Column length
L := 24 ft
# Column spread of plasticity
l_p1 := 0.08*L = 23.04 in
# Gage length ratio for unconfine conc.
λ_c := 16 in/l_p1 = 0.694444
# Young's modulus of Concrete
E_c := 3250 ksi
# Cracking Stress of Concrete
f'_t := 300 psi*ln(1 + f'_c/(1800 psi)) = 439.901 psi
# Cracking Strain of Concrete
ε'_t := f'_t/E_c = 0.000135354
# Modified Mander's Model
f_unconfined(ε) :=
    if 0 ≤ ε ≤ ε'_t
        ε*E_c
    else if ε > ε'_t
        0.6*f'_t/(1 + sqrt(500*ε))
    else if ε'_c ≤ ε ≤ 0
        -(1 - (1 - ε/ε'_c)^η_E)*f'_c
    else if ε'_cu ≤ ε ≤ ε'_c
        -(1 + 1/λ_c*(ε/ε'_c - 1))/(r_c - 1 + (1 + (1/λ_c)*(ε/ε'_c - 1))^r_c)*r_c*f'_c
    else
        0
ε := ε'_t, -0.00001 .. -0.007
# [chart]
    Y := f_unconfined(ε)
    X := ε
