# Worksheet setting: ORIGIN = 1
Y_concrete := READEXCEL("..\..\..\..\..\..\..\temp\temp.xlsx", "Sheet1!A2:A26") in
A_unconfined := READEXCEL("..\..\..\..\..\..\..\temp\temp.xlsx", "Sheet1!B2:B26") in^2
A_confined := READEXCEL("..\..\..\..\..\..\..\temp\temp.xlsx", "Sheet1!C2:C26") in^2
Y_steel := READEXCEL("..\..\..\..\..\..\..\temp\temp.xlsx", "Sheet1!D2:D6") in
A_steel := READEXCEL("..\..\..\..\..\..\..\temp\temp.xlsx", "Sheet1!E2:E6") in^2
Y_concrete = [0.96; 2.88; 4.8; 6.72; 8.64; 10.56; 12.48; 14.4; 16.32; 18.24; 20.16; 22.08; 24; 25.92; 27.84; 29.76; 31.68; 33.6; 35.52; 37.44; 39.36; 41.28; 43.2; 45.12; 47.04] in
A_unconfined = [25.8048; 20.1192; 14.0522; 11.6703; 10.3325; 9.471; 8.87701; 8.45343; 8.14873; 7.93333; 7.78955; 7.70695; 7.68; 7.70695; 7.78955; 7.93333; 8.14873; 8.45343; 8.87701; 9.471; 10.3325; 11.6703; 14.0522; 20.1192; 25.8048] in^2
A_confined = [0; 23.6544; 41.2438; 52.2863; 60.481; 66.8829; 71.972; 76.0126; 79.1653; 81.5331; 83.1832; 84.1577; 84.48; 84.1577; 83.1832; 81.5331; 79.1653; 76.0126; 71.972; 66.8829; 60.481; 52.2863; 41.2438; 23.6544; 0] in^2
Y_steel = [3.35; 8.81; 24; 39.19; 44.65] in
A_steel = [4.68; 6.24; 6.24; 6.24; 4.68] in^2
# [reference: Mander_Steel.mcdx]
# [reference: ModManders_ConfinedConcrete jr.mcdx]
# [reference: ModManders_UnconfinedConcrete.mcdx]
# Find Total Axial Load on Column
# Diameter of column
D := 48 in
# Area of column
A_c := D^2*π/4 = 1809.56 in^2
# Density of concrete
γ := 150 pcf = 0.0868056 lbf/in^3
# Height of column
h_col := 24 ft
# Volume of column
V := A_c*h_col = 521153 in^3
# Total axial load
P := -(522 kip + V*γ) = -567239 lbf
# Transformed area of Concrete
# Ratio of moduli
n := f_y/f'_c = 12.3833
# Transformed area
A_t := (n - 1)*sum(A_steel) + A_c = 2129.2 in^2
Y_centroid := 24 in
# Initial strain
ε_centroid := P/(E_c*A_t) = -8.19721e-5
Δε := 1*10^-6
Δϕ := 2*f_y/(E_s*D*25) = 4.27011e-6 1/in
ε'_cu = -0.006
Mϕ(ε_centroid) :=
    i_max ← 1000
    ϕ ← 0
    Δϕ ← 2/(D*25)*(f_y/E_s)
    tol ← 0.001 lbf
    ε_concrete ← ε_centroid
    ε_steel ← ε_centroid
    while min(ε_concrete) ≥ ε'_cu and max(ε_steel) ≤ ε_su
        δε ← 1*10^-6
        ϕ ← ϕ + Δϕ
        i ← 1
        while i ≤ i_max
            ε_concrete ← ϕ*(Y_centroid - Y_concrete) + ε_centroid
            σ_confined_concrete ← vectorize(f_confined(ε_concrete))
            σ_unconfined_concrete ← vectorize(f_unconfined(ε_concrete))
            F_confined ← vectorize(σ_confined_concrete*A_confined)
            F_unconfined ← vectorize(σ_unconfined_concrete*A_unconfined)
            F_concrete ← F_confined + F_unconfined
            ε_steel ← ϕ*(Y_centroid - Y_steel) + ε_centroid
            σ_steel ← vectorize(f_steel(ε_steel))
            F_steel ← vectorize(σ_steel*A_steel)
            F_total ← sum(F_concrete) + sum(F_steel)
            φ ← (P - F_total)
            if φ ≤ tol
                break
            else
                if φ < 0 and δε < 0 or φ > 0 and δε > 0
                    δε ← δε*(-0.5*δε)
                ε_centroid ← ε_centroid + δε
        M ← sum(vectorize(F_concrete*Y_concrete)) + sum(vectorize(F_steel*Y_steel))
        i ← i + 1
        return [P, M, ε_centroid]
Mϕ(ε_centroid) = [-567239 lbf, -47988491 lb*ft^2/s^2, -8.19721e-5]
ϕ := 0*1/in
ε_centroid := -8.197208*10^-5
ϕ := ϕ + Δϕ = 4.27011e-6 1/in
ε_concrete := ϕ*(Y_centroid - Y_concrete) + ε_centroid = [1.64114e-5; 8.21275e-6; 1.41269e-8; -8.18449e-6; -1.63831e-5; -2.45817e-5; -3.27804e-5; -4.0979e-5; -4.91776e-5; -5.73762e-5; -6.55748e-5; -7.37735e-5; -8.19721e-5; -9.01707e-5; -9.83693e-5; -0.000106568; -0.000114767; -0.000122965; -0.000131164; -0.000139362; -0.000147561; -0.00015576; -0.000163958; -0.000172157; -0.000180356]
ε_s := ϕ*(Y_centroid - Y_steel) + ε_centroid = [6.20579e-6; -1.7109e-5; -8.19721e-5; -0.000146835; -0.00017015]
f_confined_concrete := vectorize(f_confined(ε_concrete)) = [53.3369; 26.6914; 0.0459124; -26.5992; -53.2422; -79.8818; -106.517; -133.145; -159.767; -186.381; -212.985; -239.579; -266.162; -292.734; -319.292; -345.837; -372.366; -398.881; -425.379; -451.86; -478.323; -504.767; -531.192; -557.597; -583.981] psi
f_steel_ := vectorize(f_steel(ε_s)) = [179.968; -496.162; -2377.19; -4258.22; -4934.35] psi
f_unconfined_concrete := vectorize(f_unconfined(ε_concrete)) = [53.3369; 26.6914; 0.0459124; -29.0739; -58.145; -87.1627; -116.127; -145.038; -173.896; -202.7; -231.451; -260.148; -288.791; -317.38; -345.916; -374.398; -402.825; -431.199; -459.519; -487.784; -515.995; -544.152; -572.255; -600.303; -628.296] psi
F_steel := vectorize(f_steel_*A_steel) = [842.25; -3096.05; -14833.7; -26571.3; -23092.8] lbf
F_confined := vectorize(f_confined_concrete*A_confined) = [0; 631.37; 1.8936; -1390.77; -3220.14; -5342.72; -7666.21; -10120.7; -12648; -15196.2; -17716.8; -20162.4; -22485.4; -24635.8; -26559.7; -28197.1; -29478.5; -30320; -30615.4; -30221.7; -28929.4; -26392.4; -21908.4; -13189.6; 0] lbf
sum(F_steel) = -66.7515 kip
F_unconfined := vectorize(f_unconfined_concrete*A_unconfined) = [1376.35; 537.01; 0.64517; -339.303; -600.781; -825.518; -1030.86; -1226.07; -1417.03; -1608.09; -1802.9; -2004.94; -2217.91; -2446.03; -2694.53; -2970.22; -3282.52; -3645.11; -4079.15; -4619.8; -5331.51; -6350.44; -8041.43; -12077.6; -16213.1] lbf
F_concrete := F_confined + F_unconfined = [1376.35; 1168.38; 2.53877; -1730.08; -3820.92; -6168.24; -8697.08; -11346.8; -14065; -16804.3; -19519.7; -22167.4; -24703.3; -27081.8; -29254.2; -31167.3; -32761; -33965.1; -34694.6; -34841.5; -34260.9; -32742.9; -29949.8; -25267.2; -16213.1] lbf
sum(F_concrete) = -488675 lbf
M_steel := vectorize(F_steel*Y_steel) = [2821.54; -27276.2; -356008; -1041329; -1031091] lbf*in
M_concrete := vectorize(F_concrete*Y_concrete) = [1321.3; 3364.93; 12.1861; -11626.1; -33012.8; -65136.6; -108540; -163394; -229541; -306510; -393516; -489456; -592880; -701961; -814438; -927540; -1037869; -1141227; -1232350; -1304466; -1348511; -1351626; -1293833; -1140057; -762662] lbf*in
sum(M_steel) = -2452883 lbf*in
sum(M_concrete) = -15445453 lbf*in
sum(F_concrete) + sum(F_steel) = -555426 lbf
M := sum(M_concrete) + sum(M_steel) = -17898336 lbf*in
