d := 48 in
I_circle := π/64*d^4 = 12.5664 ft^4
L := 24 ft
γ_c := 150 pcf
V := d^2*π/4*L = 521153 in^3
A_s := [4.68; 6.24; 6.24; 6.24; 4.68] in^2
y := [3.35; 8.81; 24.00; 39.19; 44.65] in
W_sw := V*γ_c = 45238.9 lbf
I_g := I_circle + A_s*(d/2 - y)^2 = 267447 in^4
E_c := 3250 ksi
E_c*I_g = 869203277 kip*in^2
