f_y := 60000 psi
f'_c := 5000 psi
# Straight Bar Development Lengths
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λ := 1.0
ψ_t := 1.3
ψ_e := 1.0
ψ_g := 1.0
l_d(d_b) := (f_y*ψ_t*ψ_e*ψ_g/(20*λ*sqrt(f'_c/psi) psi))*d_b
# #5 Rebar
l_d(.625 in) = 34.4715 in
l_d(1.128 in) = 62.2141 in
# #9 Rebar
# #11 Rebar
l_d(1.410 in) = 77.7676 in
# Headed Bar Development Lengths
# Expoxy
ψ_e := 1.0
# Parallel Tie
ψ_p := 1.6
# Location
ψ_o := 1.25
# Concrete strength
ψ_c := f'_c/(15000 psi) + 0.6 = 0.933333
ψ_c := 0.9
# Development length
# 25.4.4.2(a)
l_d(d_b) := max((f_y*ψ_e*ψ_p*ψ_o*ψ_c/(75*sqrt(f'_c/psi) psi))*(d_b/in)^1.5 in, 8*d_b, 6 in)
# #9 Rebar
l_d(1.128 in) = 24.3973 in
# #11 Rebar
l_d(1.410 in) = 34.0962 in
# Skin Reinforcement
# Thickness of wall
t := 18 in
# Spacing
s := 8 in
# Needed Reinforcement
0.0025*t*s = 0.36 in^2
# For skin reinforcement there needs to be (2)#4 @8" O.C. on each face in both directions
# Slab Reinforcement
# (2)#6 @ 8"OC
# Diaphragm Design
# Capacity Factor
ϕ := 0.75
# Shear Demand
V_u := 845 kip
# Thickness of Diaphragm
# Required area
A_c_req := V_u/(ϕ*min(0.2*f'_c, 480 psi + 0.08*f'_c, 1600 psi)) = 1280.3 in^2
# Length of wall
l := 10.5 ft
# Require thickness
w_req := A_c_req/l = 10.1611 in
# Thickness of wall used
w := 12 in
# Area of Concrete
A_c := w*l = 1512 in^2
# Capacity
V_n := min(0.2*f'_c, 480 psi + 0.08*f'_c, 1600 psi)*A_c = 1330.56 kip
# Check
ϕ*V_n ≥ V_u = 1
# Reinforcement
# Normal Weight Concrete
λ := 1.0
# Coefficient of friction
μ := 1.0*λ
# Required Cross Section
A_vt := V_u/(ϕ*μ*f_y) = 18.7778 in^2
# #5 Rebar Area
A_s_each := 0.31 in^2
# Spacing
s := 4 in
# Provided rebar
A_s_pro := 2*A_s_each*l/s = 19.53 in^2
# The diaphragms are going to be 12" thick with #5 @ 4" o.c. on both walls
# The Far Column Column Reinforcement
# Shear Demand
V_u := 845 kip
bars := 24
V_u/(f_y*bars) = 0.586806 in^2
# Embed Plate Design
# Tie Design
# Tie CL
# Yielding stress of rebar
f_y = 60 ksi
# Load combo 1 demand
T_1 := 400 kip
# Load combo 2 demand
T_2 := 260 kip
# Max. force
F_max := max(T_1, T_2) = 400 kip
# Required Area
A_req := F_max/(ϕ*f_y) = 8.88889 in^2
# Number of Rebars
n := 10
# Area of each rebar
A_s_ea := 1.00 in^2
# Area provided
A_s_provided := n*A_s_ea = 10 in^2
# Check
A_s_provided > A_req = 1
# Tie JL
# Yielding stress of rebar
f_y = 60 ksi
# Load combo 1 demand
T_1 := 400 kip
# Load combo 2 demand
T_2 := 260 kip
# Max. force
F_max := max(T_1, T_2) = 400 kip
# Required Area
A_req := F_max/(ϕ*f_y) = 8.88889 in^2
# Number of Rebars
n := 6
# Area of each rebar
A_s_ea := 1.56 in^2
# Area provided
A_s_provided := n*A_s_ea = 9.36 in^2
# Check
A_s_provided > A_req = 1
