# Worksheet setting: ORIGIN = 1
E_s := 29000 ksi
f_y := 60 ksi
f'_c := -7 ksi
ε_c := -0.003
β_1 := max(0.65, min(0.9, 0.85 - 0.05*(-f'_c - 4 ksi)/ksi)) = 0.7
γ := 0.85
# Core Wall Dimensions
# Thickness of Web
t_1 := 28 in
# Thickness of Flange
t_2 := 28 in
# Length of Flange
L_w1 := 11 ft + 8 in = 140 in
# Length of Web
L_w2 := 26 ft + 4 in = 316 in
# Area of flange
A_f := L_w1*t_1 = 3920 in^2
# Area of web
A_w := (L_w2 - 2*t_1)*t_2 = 7280 in^2
# Total Area
A_g := 2*A_f + A_w = 15120 in^2
# Centroid of Concrete
# The centroid of
# Layer of steel in web
d_s[1] := t_2/2 = 14 in
# 1st layer of steel in flange
d_s[2] := 0.25*L_w1 = 35 in
# 2nd layer of steel in flange
d_s[3] := 0.75*L_w1 = 105 in
ρ := 0.004
A_s := ρ*[A_w; A_f/2 + A_f/2; A_f/2 + A_f/2] = [29.12; 15.68; 15.68] in^2
X_s := sum(vectorize(A_s*d_s))/sum(A_s) = 43.037 in
# Centroid of Concrete
X_c := ((2*A_f)*L_w1/2 + A_w*t_2/2)/A_g = 43.037 in
Y_top := X_c
c := 8.0 in
ϕ := ε_c/c = -0.000375 1/in
ε_s := ϕ*(c - d_s) = [0.00225; 0.010125; 0.036375]
f_s := sign(ε_s)*min(ε_s*E_s, f_y) = [60; 60; 60] ksi
F_s := vectorize(A_s*f_s) = [1747.2; 940.8; 940.8] kip
F_c := (2*t_1)*(β_1*c)*(γ*f'_c) = -1865.92 kip
P_n := F_c + sum(F_s) = 1762.88 kip
M_n := F_c*(Y_top - (β_1*c)/2) + vectorize(sum(F_s*(d_s - Y_top))) = -6256.59 kip*ft
# Initialization
# Here are the material properties used in the design
# Masonry
# Compressive strength
f'_m := 7 ksi
# Maximum compressive strain
ε_mu := 0.003
# Equivalent stress block parameter
β := 0.7
# Equivalent stress block parameter
γ := 0.85
# Steel
# Yielding stress of reinforcement
f_y := 60 ksi
# Modulus of elasticity
E_s := 29000 ksi
# Yielding strain of reinforcement
ε_y := f_y/E_s = 0.00206897
# For each case, the area of steel has to be defined as well as the depth from the top and bottom.
ρ := 0.0125
# Area of reinforcement
A_s := ρ*[A_w; A_f/2 + A_f/2; A_f/2 + A_f/2] = [91; 49; 49] in^2
# Depth of reinforcement
# from top and bottom of section
d := [0.5*t_2; 0.25*L_w1; 0.75*L_w1] = [14; 35; 105] in
# In the case of flanged cross sections, the width and height should also be specified.
# Web dimensions
w_web := 316 in
h_web := 28 in
y := h_web/2
# The capacity for a given centroidal axis is found using the following function.
# Brief description:
capacity(c) :=
    for k ∈ 1 .. length(A_s)
        ε_s[k] ← ε_mu*(d[k] - c)/c
        f_s[k] ← max(min(ε_s[k]*E_s, f_y), 0)
        F_s[k] ← f_s[k]*A_s[k]
    a ← c*β
    C_web ← γ*f'_m*a*w_web
    P_n ← C_web - sum(F_s)
    M_n ← C_web*(y - a/2) + vectorize(sum(F_s*(d - y)))
    return [P_n, M_n]
# The for loop find the strain of each rebar, assuming a linear stress-strain relationship for the entire section. This strain is then used to calculate the stress, bounded by the yielding stress and 0 ksi, assuming the rebar would buckle under compression and can't contribute strength. The tensile force produced by each bar is then found using this stress.
# The compressive force of the web is found using the equivalent stress block. The axial load is this force minus the tensile force in the rebar. The moment of the section is taken about the centroid of the section.
# This PM curve is then developed by calling the capacity function on a range of centroidal values from 0.1 in to the height of the section and stored in the P and M arrays.
# The solution array:
[P, M] :=
    i ← 1
    for c ∈ 0.1 in, 1 in .. h_web
        [P_n[i], M_n[i]] ← capacity(c)
        i ← i + 1
    return [P_n, M_n]
# If there was a certain axial demand that was of particular interest, they can be inputted and a corresponding axial-moment capacity can be outputted.
# Demand:
P_u := 6199 kip
M_u := 27322 kip*ft
# index
i := match(P_u, P, "near")[1] = 13
# Capacity:
P_n := P[i] = 6214.3 kip
M_n := M[i] = 39616.1 kip*ft
# [plot: P (kip), P_n (kip), P_u (kip) vs M (kip*ft), M_n (kip*ft), M_u (kip*ft)]
