# Steel areas for rebar
A_s#5 := 0.31 in^2
A_s#8 := 0.79 in^2
A_s#9 := 1.0 in^2
# Diameters for rebar
d_b#5 := 0.625 in
d_b#9 := 1.00 in
d_b#9 := 1.128 in
# Dimension
# Thickness of web 1
t[1] := 28 in
# Thickness of web 2
t[2] := 28 in
# Thickness of web 3
t[3] := 28 in
# Length of web 1
l[1] := 140 in
# Length of web 2
l[2] := 260 in
# Length of web 3
l[3] := 140 in
# Total area of wall
A_g := sum(vectorize(t*l)) = 15120 in^2
# Required steel ratio
ρ := 1.4%
# Required steel area
A_s_req := ρ*A_g = 211.68 in^2
# Boundary Element
# Boundary element as previously designed.
# Width of the boundary element
L_BE := 28 in
# Height of the boundary element
H_BE := 28 in
# Area of boundary element
A_c_BOUNDARY := L_BE*H_BE = 784 in^2
# Reinforcement Area in boundary element
A_s_BOUNDARY := 16*A_s#9
# Reinforcing ratio
ρ_BOUNDARY := A_s_BOUNDARY/A_c_BOUNDARY = 0.0204082
# Corner Section
# Number of rebars in (1) curtain
n := 17
# Total number of rebars
N_CORNER := 2*n = 34
# Reinforcement in corner section
A_s_CORNER := N_CORNER*A_s#9 = 34 in^2
# Width of corner
b_CORNER := 28 in
# Cover
d_cover := 1.5 in
# Spacing of rebar
s := 4 in
H_CORNER := 2*d_b#5 + d_b#9 + (n - 1)*s + d_cover = 67.878 in
# Estimating length of 1 curain; considering hoop and spacing
H_CORNER := Round(H_CORNER, 1 in) = 68 in
# Area of corner
A_c_CORNER := H_CORNER*b_CORNER = 1904 in^2
# Reinforcing ratio
ρ_BOUNDARY := A_s_CORNER/A_c_CORNER = 0.0178571
# Remaining Rebar
# Area left to distbriute
A_left := A_s_req - 2*A_s_BOUNDARY - 2*A_s_CORNER = 111.68 in^2
# Number per bundle and area of each
N_per_bundle := 1
A_s_ea := A_s#9
# Number of bundles need
N := Ceil(A_left/(N_per_bundle*A_s_ea), 1) = 112
# Number of curtains
N_curtain := 2
# Number of bundles/curtain
N_req_per_curatain := Round(N/N_curtain, 1) = 56
# Spacing of longitudinal bars
s := 8 in
# Remaining web 1 length for rebar
FLANGE_remaining := l[1] - L_BE - b_CORNER = 84 in
# Max rebar allowed in web 1 for spacing
N_req_flange := Floor(FLANGE_remaining/s, 1) = 10
# Used number of rebars in flange
N_flange := 10
# Remaining web 2 length for rebar
WEB_remaining := (l[2] + t[1] + t[3]) - 2*H_CORNER = 180 in
# Max. rebar allowed in web 2 for spacing
N_req_web := Floor(WEB_remaining/s, 1) = 22
# Used number of rebars in flange
N_web := 26
# Total rebar in other parts of wall
N_design_per_curtain := N_web + 2*N_flange = 46
# Area outside of the BE and Corner
A_ELSEWHERE := N_curtain*N_design_per_curtain*N_per_bundle*A_s_ea = 92 in^2
# Total area of steel
A_s_total := A_ELSEWHERE + 2*A_s_CORNER + 2*A_s_BOUNDARY = 192 in^2
A_s_req = 211.68 in^2
ρ_final := A_s_total/A_g = 0.0126984
# Final steel ratio
# In each flange, there will be 2 curtains of (10) bundles of 1#9 bars spaced @ 8" o.c.
# In the web, there will be 2 curtains of (26) bundles of 1#9 bars spaced @8" o.c.
# This will give N_design_per_curtain = 46bundles with a total area of A_ELSEWHERE = 92 in^2.
# With the addition of the 2 boundary element areas of steel and two corner elements, this will give a total of A_s_total = 192 in^2 which is greater than the required A_s_req = 211.68 in^2.
# This reinforcement design has a steel ratio of ρ_final = 0.0126984
