# Demands
P_u := [6199; -13256; 1006; -18449] kip
V_u_EW := [898; -898; 891; -891] kip
M_u := [27322; -27460; 27243; -27540] kip*ft
maximum(a, b) := max(a, b)
minimum(a, b) := min(a, b)
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# Expected moment capacity
M_pr := [53312.5; -86676.9; 85496.8; -101504] kip*ft
# Takes into account (f_y == 1.25*f_y) and (ϕ == 1.0)
# Expected shear demand  §18.10.3
# It is taken that h_wcs/l_w > 1
Ω_v := vectorize(maximum(M_pr/M_u, 1.5)) = [1.95127; 3.15648; 3.1383; 3.68569]  # §18.10.3.1.2
n_s := 14
# Number of stories
# §18.10.3.1.3
ω_v :=
    if n_s ≤ 6
        0.9 + n_s/10
    else if n_s > 6
        min(1.3 + n_s/30, 1.8)
    = 1.76667
# Dynamic amplification factor
# Expected Shear Demand
V_e := max(vectorize(V_u_EW*vectorize(minimum(ω_v*Ω_v, 3)))) = 2694 kip  # §18.10.3.1
# Capacity §18.10.4
# Length of the wall
L_wall := 140 in
# Thickness of the wall
t_wall := 28 in
# Area of wall parallel to seismic force
A_cv := L_wall*t_wall = 3920 in^2
# Normalweight concret
λ := 1.0
# Taken that h_w/l_w ≥ 2
α_c := 2
# Compressive strength of concrete
f'_c := 7 ksi
# Tensile strength of steel rebar
f_y := 60 ksi
# Shear capacity factor
ϕ_v := 0.75
# Concrete Capacity
V_nc := ϕ_v*(α_c*λ*sqrt(f'_c/psi) psi)*A_cv = 491.956 kip  # §18.10.4.1
# Required steel capacity
V_s_req := V_e - V_nc = 2202.04 kip
# Steel ratio required
ρ_req := max(V_s_req/(ϕ_v*f_y*A_cv), 0.0025) = 0.0124832
# Required steel area
A_s_req := V_s_req/(ϕ_v*f_y) = 48.9343 in^2
# Area of steel rebar used
A_s#6 := 0.44 in^2
# Number of layers
N_layer := 4
# Spacing of rebar
s := 5 in
# Total area of steel provided
A_s := N_layer*A_s#6 = 1.76 in^2
# Steel ratio provided
ρ_provided := A_s/(s*t_wall) = 0.0125714
# Factored Capacity
ϕ_vV_n := ϕ_v*(α_c*λ*sqrt(f'_c/psi) psi + ρ_provided*f_y)*A_cv = 2709.56 kip
# Check
ϕ_vV_n ≥ V_e = 1
# For shear reinforcement of the EW wall, 4 layers of #6 bars spaced at 5" is adequate and shall be provided.
