# Coupling beam parameters
# The dimensions of the beam are
# Height of beam
h := 42 in
# Width of beam
b := 28 in
# Length of beam
l_n := 7.0 ft
# The material property of the concrete and rebar are
# Yielding strength
f_y := 60 ksi
# Compressive strength
f'_c := 7 ksi
# The design demands are
# Maximum shear
V_u := 649 kip
# Maximum moment
M_u := 2242 kip*ft
# Preliminary Checks
# Following ACI 318-19 provisions, 18.10.7 Coupling Beams, the coupling beams will be diagonally reinforced.
# Area of concrete
A_cw := h*b = 1176 in^2
# Ratio of length to height of beam
l_n/h = 2  # §(18.10.7.2)
# Concrete parameter
λ := 1.0
# Check that shear capacity is required
4.0*λ*sqrt(f'_c/psi) psi*A_cw = 393.565 kip  # §(18.10.7.2)
# Determine the angle of diagonal reinforcement
# The initial guess angle of the diagonal reinforcements considers #11 diagonal rebars @8" O.C. and #5 vertical hoops.
α := atan(h/l_n) = 26.5651°
# First order approximation
# #9 Diagonal bars
d_b := 1.410 in
# #5 Vertical hoops
d_b_hoop := 0.625 in
# Estimated Cover
d_cover := 1.5 in
# Spacing between diagonal bars
s := 8 in
# Total spacing between the two bars
d_total := ((s - d_b)/2*1/cos(α)) + (d_b/cos(α)) + d_b_hoop + d_cover = 7.38535 in
# Adjusted angle of the rebar
α := atan((h - 2*d_total)/l_n) = 17.9605°
# Diagonal Reinforcement Using the Catalogue Method
# The diagonal reinforcement will be 14 #11 bars.
# Shear capacity factor
ϕ := 0.85  # §(21.2.4.4)
# Number of diagonal bars
n_bars := 14
# Total area of reabr
A_vd := n_bars*d_b^2*π/4 = 21.8603 in^2
# Max shear capacity
V_n_max := 10*sqrt(f'_c/psi) psi*A_cw = 983.912 kip  # §(18.10.7.4)
# Shear capacity
V_n := min(2*A_vd*f_y*sin(α), V_n_max) = 808.906 kip  # §(18.10.7.4)
# Factored Shear capacity
ϕ*V_n = 687.57 kip
# Check
ϕ*V_n > V_u = 1  # §(9.5.1)
# Check Angle of Reinforcement
# Since there are four layers of reinforcement, the spacing between the first and fourth row is the sum of 2 bar diameters and 3 clear spacing. In the design, the diagonal are #9 bars and the clear spacing is 2". This gives a clear spacing between the first and fourth row as 8.25".
# Clear spacing
d_clear := 2 in
d_clear := 2*d_b + 3*d_clear = 8.82 in
# Total distance
d_total := (d_clear/2*1/cos(α)) + (d_b/cos(α)) + d_b_hoop + d_cover = 8.24314 in
# True angle
α := atan((h - 2*d_total)/l_n) = 16.8954°
# Development length of the Reinforcement
# The development of the diagonal rebars will be straight for 63 inches.
# Casting Position (other)
ψ_t := 1.3  # §(25.4.2.5)
# Epoxy Coefficient (Uncoated)
ψ_e := 1.0  # §(25.4.2.5)
# Reinforcement Grade (60)
ψ_g := 1.0  # §(25.4.2.5)
# Normal Weight
λ := 1.0  # §(25.4.2.5)
# Straight bar development length(No. 7 and Larger)
l_d(d_b) := 1.25*(f_y*ψ_t*ψ_e*ψ_g/(20*λ*sqrt(f'_c/psi) psi))*d_b  # §(25.4.2.3)
# #9 Rebar Development length
l_req := l_d(1.128 in) = 65.7256 in
l_req*cos(α) = 62.8887 in
# Available Length
l_wall := 10.5 ft
# Check (Fudge length 6" is used)
l_wall - 6 in ≥ l_req*cos(α) = 1
# Hoops and Cross-Ties Confinement
# The required vertical and horizontal rebars are calculated
# Area of hoops
A_b := d_b_hoop^2*π/4 = 0.306796 in^2
# Spacing of diagonals
s := 4 in
# Max spacing
s_max := min(6 in, 6*d_b) = 6 in  # §(18.10.7.4)
# Width assuming clear cover
b_c1 := b - 2*d_cover = 25 in
# Height assuming clear cover
b_c2 := h - 2*d_cover = 39 in
# Area of confined concrete
A_ch := b_c1*b_c2 = 975 in^2
# Total area of beam
A_g := b*h = 1176 in^2
# Equation 1
eq_i(b) := 0.09*s*b*(f'_c/f_y)  # §(18.10.7.4 (c&d  i))
# Equation 2
eq_ii(b) := 0.3*s*b*(A_g/A_ch - 1)*(f'_c/f_y)  # §(18.10.7.4 (c&d ii))
# Required hor. rebar
A_sh_hor_req := max(eq_i(b_c1), eq_ii(b_c1)) = 1.05 in^2
# Required ver. rebar
A_sh_ver_req := max(eq_i(b_c2), eq_ii(b_c2)) = 1.638 in^2
# Detail Hoops and Cross-Ties Confinement for Entire Beam
# There will be one #5 bar that goes all the way around the entire section. This is in addition to #4 provided in the vertical and horizontal direction. The required area of steel reinforcement was A_sh_hor_req = 1.05 in^2 in the horizontal direction and A_sh_ver_req = 1.638 in^2 in the vertical direction.
#
# (3)#5 bars will be provided in the hor. direction and (5)#5 bars will be provided in the vert. direction in addition to one #5 bar provided around the perimeter
# Number of bars in the hor. dir.
n_hor := 3
# Area of #5 Bars
A_b#5 := 0.31 in^2
# Rebar area provided horizontally
A_sh_hor := n_hor*A_b#5 + 2*A_b#5 = 1.55 in^2
# Check
A_sh_hor > A_sh_hor_req = 1
# Number of bars in the hor. dir.
n_ver := 5
# Rebar area provided vertically
A_sh_ver := n_ver*A_b#5 + 2*A_b#5 = 2.17 in^2
# Check
A_sh_ver > A_sh_ver_req = 1
