# Worksheet setting: ORIGIN = 1
# Design Response Spectrum
# Spectral 1s response acceleration
S_1 := 0.700
# Spectral short response acceleration
S_s := 1.966
# Short period site coefficient; Site Class D
F_a := 1.0
# Long period site coefficient; Site Class D
F_v := 1.7
# Adjusted short response acceleration
S_MS := F_a*S_s = 1.966
# Adjusted short response acceleration
S_M1 := F_v*S_1 = 1.19
# Design short response acceleration
S_DS := 2/3*S_MS = 1.31067
# Design short response acceleration
S_D1 := 2/3*S_M1 = 0.793333
# Short response period
T_s := S_D1/S_DS = 0.60529
# Seismic Response Factor
T_o := 0.2*(S_D1/S_DS) = 0.121058
# Long Period
T_L := 8
# [chart]
    X[1] := t
    Y[1] :=
        if t ≤ T_o
            S_DS*(0.4 + 0.6*t/T_o)
        else if T_o < t ≤ T_s
            S_DS
        else if T_s < t ≤ T_L
            S_D1/t
        else if t > T_L
            S_D1*T_L/t^2
    Ymin := 0
    Xmin := 0
    Xmax := 2
