# Transverse reinforcement of boundary element.
f'_c := 7 ksi
f_y := 60 ksi
cover := 1.5 in
bar# := 5
db := (bar#/8) in = 0.625 in
As := π*db^2/4 = 0.306796 in^2
l_x := 28 in
l_y := 28 in
b_cx := l_x - cover - 2*db = 25.25 in
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b_cy := l_y - 2*cover - 2*db = 23.75 in
h_x := 6.75 in
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s_a := min(l_x, l_y)/4 = 7 in
s_b := 6*1.128 in = 6.768 in  # (Grade 60)
s_c := 4 in + ((14 - h_x/in)/3) in = 6.41667 in
s_max := min(s_a, s_b, min(max(s_c, 4 in), 6 in)) = 6 in  # § (18.7.5.3)
A_ch := b_cx*b_cy = 599.687 in^2
# Find Transverse reinforcement
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A_g := l_x*l_y = 784 in^2
ρ_a := 0.3*(A_g/A_ch - 1)*f'_c/f_y = 0.0107572
ρ_b := 0.09*f'_c/f_y = 0.0105
ρ := max(ρ_a, ρ_b) = 0.0107572
s := 8 in
Rebar_x := Ash_sbc*s*b_cx/As  # error: This variable is undefined. Check that the label is set correctly.
ρ*b_cx = 0.271618 in
Rebar_y := Ash_sbc*s*b_cy/As  # error: This variable is undefined. Check that the label is set correctly.
ρ*b_cy = 0.255483 in
A_s_cx := 2*0.31 in^2 + 3*0.2 in^2 = 1.22 in^2
A_s_cx/(s*b_cx) = 0.0060396
# Spacing of coupling beam transverse hoops
d_b#9 := 1.128 in
d_b_diagonal := d_b#9 = 1.128 in
min(6 in, 6*d_b_diagonal) = 6 in  # § 18.10.7.4
# Choose to space at #5 hoops at 4in" o.c.
